*Heading
** Job name: Job Model name: test_planar_toy_problem
** Generated by: Abaqus/CAE 2024
*Preprint, echo=NO, model=NO, history=NO, contact=NO
**
** PARTS
**
*Part, name=planar
*Node
      1,   16.1803398,   11.7557049
      2,   11.7557049,   16.1803398
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*Element, type=CPS3
 1,  330,  194,  314
 2,  642,  482,  502
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*Element, type=CPS4R
  51,  384,  465,  273,  206
  52,  180, 1663,  328,  316
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*Nset, nset=_PickedSet2, internal, generate
    1,  1866,     1
*Elset, elset=_PickedSet2, internal, generate
    1,  1811,     1
** Section: Section_Solid
*Solid Section, elset=_PickedSet2, material=Material
1.,
*End Part
**
**
** ASSEMBLY
**
*Assembly, name=Assembly
**
*Instance, name=planar-1, part=planar
*End Instance
**
*Elset, elset=ALL, instance=planar-1, generate
    1,  1811,     1
*Nset, nset=_PickedSet5, internal, instance=planar-1
 15,
*Nset, nset=_PickedSet8, internal, instance=planar-1
 13, 15, 64, 65, 66, 67
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*Elset, elset=_PickedSet8, internal, instance=planar-1
  72,  73,  83, 105, 113, 120
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*Elset, elset=__PickedSurf4_S4, internal, instance=planar-1
 104, 169, 174, 176, 181, 182, 183, 187, 215, 221, 281, 337, 429
*Elset, elset=__PickedSurf4_S2, internal, instance=planar-1
 130, 131, 170, 173, 180, 184, 185, 186, 234, 245, 246, 259, 260, 283, 331, 404
*Elset, elset=__PickedSurf4_S1, internal, instance=planar-1
 163,
*Surface, type=ELEMENT, name=_PickedSurf4, internal
__PickedSurf4_S4, S4
__PickedSurf4_S2, S2
__PickedSurf4_S1, S1
*End Assembly
**
** MATERIALS
**
*Material, name=Material
*Density
 2.7e-09,
*Elastic
{{youngs_modulus}}, 0.3
** ----------------------------------------------------------------
**
** STEP: Elastic
**
*Step, name=Elastic, nlgeom=NO
*Static
1., 1., 1e-05, 1.
**
** BOUNDARY CONDITIONS
**
** Name: BC-1 Type: �Գ�/���Գ�/��ȫ�̶�
*Boundary
_PickedSet5, ENCASTRE
** Name: BC-2 Type: �Գ�/���Գ�/��ȫ�̶�
*Boundary
_PickedSet8, XSYMM
**
** LOADS
**
** Name: Load   Type: Pressure
*Dsload
_PickedSurf4, P, -{{load_magnitude}}
**
** OUTPUT REQUESTS
**
*Restart, write, frequency=0
**
** FIELD OUTPUT: F-Output-1
**
*Output, field, variable=PRESELECT
**
** HISTORY OUTPUT: H-Output-1
**
*Output, history, variable=PRESELECT

*EL PRINT, ELSET=ALL, FREQUENCY=9999, POSITION=INTEGRATION POINTS, SUMMARY=YES
MISES

*End Step
